// COMSOL Multiphysics 5.5.0.292 model "Задача механики (solid mechanics) (ПВ-201 Машуров Дмитрий).mph"
// Outline of the model tree

Geometry
  geom1 "Geometry 1" (2D, length unit cm)
    r1: Rectangle | pos = {-7, 1}; size = {3, 13}
    r2: Rectangle | pos = {-7, -14}; size = {3, 15}
    c1: Circle | pos = {-3, -3}; r = 3
    dif1: Difference | input = r1, r2; input2 = c1
    fin: Finalize "Form Union"

Materials
  mat1: Common "Bone" on all domains
    def "Basic"
      youngsmodulus = 1000000000000
      poissonsratio = 0.3
      density = 3050

Physics
  solid: SolidMechanics on all domains
    dependent variable u = {u, v, w}
    lemm1: LinearElasticModel "Linear Elastic Material 1" (default)
    free1: Free (default)
    init1: init "Initial Values 1" (default)
    bndl1: BoundaryLoad on boundaries 3 | FperArea = {1, 0, 0}
    fix1: Fixed "Fixed Constraint 1" on boundaries 2

Mesh
  mesh1 "Mesh 1" (physics-controlled)

Studies
  std1 "Study 1"
    stat: Stationary

Solver configurations
  sol1 "Solution 1" (study std1)
    v1: Variables "Dependent Variables 1"
    s1: Stationary "Stationary Solver 1"
      dDef: Direct
      fc1: FullyCoupled | linsolver = dDef

Datasets
  dset1: Solution | solution = sol1

Plots
  pg1: PlotGroup2D "Stress (solid)" | data = dset1
    surf1: Surface | expr = solid.mises
      def: Deform "Deformation" | expr = {u, v}; descr = Displacement field