// COMSOL Multiphysics 5.5.0.292 model "ПЗ по Comsol от 26 октября.mph"
// Outline of the model tree

Geometry
  geom1 "Geometry 1" (3D, length unit m)
    blk1: Block | size = {3, 0.1, 3}
    blk2: Block | pos = {1.4, -3, 1.3}; size = {0.3, 3, 0.3}
    blk3: Block | pos = {0, 0.1, 0}; size = {0.2, 3, 0.2}
    blk4: Block | pos = {2.8, 0.1, 0}; size = {0.2, 3, 0.2}
    blk5: Block | pos = {2.8, 0.1, 2.8}; size = {0.2, 3, 0.2}
    blk6: Block | pos = {0, 0.1, 2.8}; size = {0.2, 3, 0.2}
    fin: Finalize "Form Union"

Materials
  mat1: Common "Structural steel" on all domains
    def "Basic"
      relpermeability = 1
      heatcapacity = 475[J/(kg*K)]
      thermalconductivity = 44.5[W/(m*K)]
      electricconductivity = 4.032e6[S/m]
      relpermittivity = 1
      thermalexpansioncoefficient = 12.3e-6[1/K]
      density = 7850[kg/m^3]
    Enu "Young's modulus and Poisson's ratio"
      youngsmodulus = 200e9[Pa]
      poissonsratio = 0.30
    Murnaghan
      l = -3.0e11[Pa]
      m = -6.2e11[Pa]
      n = -7.2e11[Pa]
    Lame "Lamé parameters"
      lambLame = 1.15e11[Pa]
      muLame = 7.69e10[Pa]

Physics
  solid: SolidMechanics on all domains
    dependent variable u = {u, v, w}
    lemm1: LinearElasticModel "Linear Elastic Material 1" (default)
    free1: Free (default)
    init1: init "Initial Values 1" (default)
    bndl1: BoundaryLoad on boundaries 19 | FperArea = {0, 5, 0}
    fix1: Fixed "Fixed Constraint 1" on boundaries 5-7, 9-17, 24-33, 35, 36

Mesh
  mesh1 "Mesh 1" (physics-controlled)

Studies
  std1 "Study 1"
    stat: Stationary

Solver configurations
  sol1 "Solution 1" (study std1)
    v1: Variables "Dependent Variables 1"
    s1: Stationary "Stationary Solver 1"
      fc1: FullyCoupled | linsolver = d1
      d1: Direct "Suggested Direct Solver (solid)"

Datasets
  dset1: Solution | solution = sol1

Tables
  mm1: Table "Maximum and minimum values"
    // Max/min point
    X | Y | Z | Total displacement (m)
    0 | 0.1 | 0 | 0
    1.4 | -3 | 1.6 | 2.72482e-09

Plots
  pg1: PlotGroup3D "Stress (solid)" | data = dset1
    surf1: Surface | expr = solid.mises
      def: Deform "Deformation" | expr = {u, v, w}; descr = Displacement field
    mmp1: MaxMinPoint | expr = solid.disp; table = mm1
    priv1: PrincipalVolume "Principal Stress Volume 1"
  pg2: PlotGroup3D "Boundary Loads (solid)" | data = dset1; typeintitle = off; descriptionintitle = off; unitintitle = off
    arws1: ArrowSurface "Boundary Load 1" | expr = {solid.bndl1.F_Ax, solid.bndl1.F_Ay, solid.bndl1.F_Az}
      col: Color "Color Expression" | expr = comp1.solid.bndl1.F_A_Mag
      def: Deform "Deformation" | expr = {u, v, w}; descr = Displacement field
    surf1: Surface "Gray Surfaces" (disabled) | expr = 1
      def: Deform "Deformation" | expr = {u, v, w}; descr = Displacement field